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/batch
! ANSYS input file written by Workbench version 2023 R2
! File used for geometry attach: C:\Users\Administrator\Documents\Discovery Projects\ansysplusplus_files\dp0\Geom-1\DM\Geom-1.scdoc
/title,ansysplusplus--Structure statique (D5)
/COM,/COM,     ANSYSMotion, 2023.2
/com,--- Data in consistent MKS units. See Solving Units in the help system for more information.
/units,MKS
/prep7
! Turn off shape checking because checks already performed inside WB mesher.
! See help system for more information.
SHPP,OFF,,NOWARN
etcon,set             ! allow ANSYS to choose best KEYOP's for 180x elements, resets any applicable keyopt to MAPDL defaults
/com,*********** Nodes for the whole assembly ***********
nblock,3,,1505
(1i9,3e20.9e3)
      709     2.000000000E-02     5.000000000E-04    -1.000000000E-02
      710     2.000000000E-02     5.000000000E-04     0.000000000E+00
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-1
/com,*********** Elements for Body 1 "Surface moyenne - Corps\Surface moyenne1" ***********
et,1,181
keyo,1,1,0       ! bending and membrane stiffness
keyo,1,3,2
eblock,19,solid,,620
(19i9)
        1        1        1        1        0        0        0        0        4        0        1        1        2        4        3
        1        1        1        1        0        0        0        0        4        0        2        3        4        6        5
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-1
/com,*********** Elements for Body 2 "Surface moyenne - Corps\Surface moyenne1" ***********
et,2,281
keyo,2,1,0       ! bending and membrane stiffness
eblock,19,solid,,200
(19i9)
        2        2        2        2        0        0        0        0        8        0      621      789      788      929      769     1113     1115     1059     1058
        2        2        2        2        0        0        0        0        8        0      622      769      779      799      789     1056     1090     1116     1058
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-1
/com,*********** Send User Defined Coordinate System(s) ***********
csys,0
toffst,273.15,  ! Temperature offset from absolute zero
/com,*********** Set Reference Temperature ***********
tref,22.
/com,*********** Send Materials ***********
Temperature = 'TEMP' ! Temperature
MP,DENS,1,7850,	! kg m^-3
MP,ALPX,1,1.2e-05,	! C^-1
MP,C,1,434,	! J kg^-1 C^-1
MP,KXX,1,60.5,	! W m^-1 C^-1
MP,RSVX,1,1.7e-07,	! kg m^3 A^-2 s^-3
MP,EX,1,200000000000,	! Pa
MP,NUXY,1,0.3,
MP,MURX,1,10000,

Temperature = 'TEMP' ! Temperature
MP,DENS,2,7200,	! kg m^-3
MP,ALPX,2,1.1e-05,	! C^-1
MP,C,2,447,	! J kg^-1 C^-1
MP,KXX,2,52,	! W m^-1 C^-1
MP,RSVX,2,9.6e-08,	! kg m^3 A^-2 s^-3
MP,EX,2,110000000000,	! Pa
MP,NUXY,2,0.28,
MP,MURX,2,10000,

/com,*********** Send Sheet Properties ***********
sectype,1,shell
secdata,1.e-003
secoff,mid

sectype,2,shell
secdata,2.e-003
secoff,mid

!************************* Model Summary ********************
!Surface moyenne - Corps\Surface moyenne1,	Acier standard,	matid,	1
!Surface moyenne - Corps\Surface moyenne1,	Fonte grise,	matid,	2
!************************* End Model Summary ********************
/com,*********** Create Contact "Lié totalement - Surface moyenne - Corps\Surface moyenne1 à Surface moyenne - Corps\Surface moyenne1" ***********
*set,tid,4
*set,cid,3
r,tid
r,cid
et,tid,170
et,cid,177
tshape,para
eblock,10,,,20
(15i9)
      821        3        3        3        0      740      768     1001
      822        3        3        3        0      768      767     1053
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-1
eblock,10,,,20
(15i9)
      841        4        3        4        0      673      671
      842        4        3        4        0      671      670
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-1
tshape
esel,s,type,,cid
esel,r,real,,cid
*get,_elow,elem,0,num,min
enorm,_elow,,,,,NOWARN       ! enorm in case the edges are not aligned. don't issues warnings
esel,s,type,,tid
esel,r,real,,cid
*get,_elow,elem,0,num,min
enorm,_elow,,,,,NOWARN       ! enorm in case the edges are not aligned. don't issues warnings
keyo,cid,3,2               ! beam-beam or line segments edge contact, include all possible contact
keyo,cid,10,0              ! adjust contact stiffness each NR iteration (from Program Controlled setting)
keyo,cid,12,5              ! bonded always
keyo,cid,18,1              ! small sliding turned on by application
keyo,cid,2,2               ! MPC for bonded contacts shell-shell/solid-shell (from Program Controlled setting)
keyo,tid,5,4               ! Force Distributed Constraint, All Directions
keyo,cid,9,1               ! ignore initial gaps/penetration
keyo,cid,7,0               ! No Prediction
rmod,cid,3,10.      ! FKN
rmod,cid,5,0.       ! ICONT
rmod,cid,6,0.       ! PINB
rmod,cid,10,0.      ! CNOF
rmod,cid,12,0.      ! FKT
rmod,cid,36,62      ! WB DSID
nsel,all
esel,all
/com,*********** Fixed Supports ***********
CMBLOCK,_FIXEDSU,NODE,       21
(8i10)
       632       633       634       635       636       637       638       639
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cmsel,s,_FIXEDSU
d,all,all
nsel,all
/com,*********** Define Line Pressure Vector Using Surface Effect Elements ***********
local,12,0,0.,0.,0.,0.,0.,0.
csys,0
et,5,156
mat,5
keyop,5,5,1         !  No orientation node
eblock,10,,,20
(15i9)
      861        5        5        5       12      689      688
      862        5        5        5       12      690      689
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-1
esel,s,type,,5
keyop,5,2,1                ! Apply load in local coordinate system
esel,all
/com,*********** Define Vertex Force Using Follower Elements ***********
et,6,201
keyo,6,1,1           ! Keep the direction constant
keyo,6,2,1           ! Apply Forces only, not moment
mat,6
real,6
type,6
en,881,708
r,6
rmod,6,1,1.0,              ! FX
mat,7
real,7
type,6
en,882,708
r,7
rmod,7,2,1.0,              ! FY
mat,8
real,8
type,6
en,883,708
r,8
rmod,8,3,1.0,              ! FZ
fini
/com,****************************************************************************
/com,*************************    SOLUTION       ********************************
/com,****************************************************************************
/solu
antype,0                   ! static analysis
_thickRatio=  0     ! Ratio of thick parts in the model
eqsl,sparse,,,,,1
cntr,print,1               ! print out contact info and also make no initial contact an error
cncheck,dmp		!	Enable program controlled contact splitting for distributed memory parallel run
dmpoption,emat,no             ! Don't combine emat file for DANSYS
dmpoption,esav,no             ! Don't combine esav file for DANSYS
nldiag,cont,iter           ! print out contact info each equilibrium iteration
rescontrol,,none                 ! Do not keep any restart files
/com,****************************************************
/com,******************* SOLVE FOR LS 1 OF 1 ****************
esel,s,type,,5
nsle
sfe,all,1,pres,1,100.
sfe,all,2,pres,1,0.
sfe,all,3,pres,1,2.60208521396521e-014
nsel,all
esel,all
esel,s,real,,6
sfe,all,1,pres,1,0.
esel,s,real,,7
sfe,all,1,pres,1,0.
esel,s,real,,8
sfe,all,1,pres,1,50.
esel,all
nsub,1,1,1
time,1.
outres,erase
outres,all,none
outres,nsol,all,
outres,rsol,all
outres,eangl,all
outres,etmp,all
outres,veng,all
outres,strs,all,
outres,epel,all,
outres,eppl,all,
outres,cont,all,
! *********** WB SOLVE COMMAND ***********
! check interactive state
*get,ANSINTER_,active,,int
*if,ANSINTER_,ne,0,then
/eof
*endif
solve
/com *************** Write FE CONNECTORS *********
CEWRITE,file,ce,,INTE
/com,****************************************************
/com,*************** FINISHED SOLVE FOR LS 1 *************
save,file,db
*get,_NSOLTHREADS,active,0,ntfs
*get,_NSOLPROCESSES,active,0,npfs
/post1
fini
